<?xml version="1.0"?>
<?xml-stylesheet type="text/xsl" href="http://jsbsim.sourceforge.net/JSBSim.xsl"?>
<fdm_config xmlns:xsi="http://www.w3.org/2001/XMLSchema-instance" name="ASK21-mi" version="2.0" release="ALPHA" xsi:noNamespaceSchemaLocation="http://jsbsim.sourceforge.net/JSBSim.xsd">
	<fileheader>
		<author> see AUTHORS.md </author>
		<filecreationdate>2018-03-09</filecreationdate>
		<version> 03/2021 </version>
		<description> ASK21 Mi </description>
	</fileheader>
	<!--FRAME NOTES:
		x: + = front  - = rear
		y: + = right  - = left
		z: + = down   - = up
	-->
	<metrics file="Systems/ask21-metrics.xml"/>
	<mass_balance>
		<ixx unit="SLUG*FT2">      1000 </ixx>
		<iyy unit="SLUG*FT2">       504 </iyy>
		<izz unit="SLUG*FT2">      2355 </izz>
		<emptywt unit="KG">       360 </emptywt>	<!--	ref. [5] Technical Data table	-->
		<location name="CG" unit="M">
			<x>  -0.845   </x>	<!--	see CoG notes in FDM-references.md	-->
			<y>   0.00    </y>
			<z>   0.76674 </z>
		</location>
		<!--	For x-position, see CoG notes in FDM-references.md	-->
		<pointmass name="Pilot">
			<weight unit="KG">    80 </weight>
			<location name="POINTMASS" unit="M">
				<x> -2.85 </x>
				<y>  0.0  </y>
				<z>  0.5  </z>
			</location>
		</pointmass>
		<pointmass name="Copilot">
			<weight unit="KG">    80 </weight>
			<location name="POINTMASS" unit="M">
				<x> -1.715 </x>
				<y>  0.0   </y>
				<z>  0.6   </z>
			</location>
		</pointmass>
		<pointmass name="Left Baggage">
			<weight unit="KG">    2 </weight>
			<location name="POINTMASS" unit="M">
				<x> -1.385 </x>
				<y> -0.4   </y>
				<z>  0.6   </z>
			</location>
		</pointmass>
		<pointmass name="Right Baggage">
			<weight unit="KG">    2 </weight>
			<location name="POINTMASS" unit="M">
				<x> -1.385 </x>
				<y>  0.4   </y>
				<z>  0.6   </z>
			</location>
		</pointmass>
		<!--	approximate from three view drawing	-->
		<pointmass name="Spin Ballast">
			<weight unit="KG">   0 </weight>
			<location name="POINTMASS" unit="M">
				<x> 3.5 </x>
				<y> 0.0 </y>
				<z> 0.8 </z>
			</location>
		</pointmass>
	</mass_balance>
	<ground_reactions>
		<contact type="BOGEY" name="FRONT_WHEEL">
			<location unit="M">
				<x> -3.29687 </x>
				<y>  0.0 </y>
				<z> 0.07763 </z>
			</location>
			<static_friction>  0.600 </static_friction>
			<dynamic_friction> 0.400 </dynamic_friction>
			<rolling_friction> 0.020 </rolling_friction>
			<spring_coeff unit="LBS/FT">      9323.00 </spring_coeff>
			<damping_coeff unit="LBS/FT/SEC">   661.50 </damping_coeff>
			<max_steer unit="DEG">20</max_steer>
			<brake_group>NONE</brake_group>
			<retractable>0</retractable>
		</contact>
		<contact type="BOGEY" name="MAIN_WHEEL">
			<location unit="M">
				<x> -1.01145 </x>
				<y>   0.0 </y>
				<z>0.00498 </z>
			</location>
			<static_friction>  0.600 </static_friction>
			<dynamic_friction> 0.400 </dynamic_friction>
			<rolling_friction> 0.020 </rolling_friction>
			<spring_coeff unit="LBS/FT">      6323.00 </spring_coeff>
			<damping_coeff unit="LBS/FT/SEC">   661.50 </damping_coeff>
			<max_steer unit="DEG">0</max_steer>
			<brake_group>LEFT</brake_group>
			<retractable>0</retractable>
		</contact>
		<contact type="BOGEY" name="TAIL_WHEEL">
			<location unit="M">
				<x>  3.60148 </x>
				<y>   0.00 </y>
				<z> 0.4706 </z>
			</location>
			<static_friction>  0.600 </static_friction>
			<dynamic_friction> 0.400 </dynamic_friction>
			<rolling_friction> 0.020 </rolling_friction>
			<spring_coeff unit="LBS/FT">        9096.90 </spring_coeff>
			<damping_coeff unit="LBS/FT/SEC">   198.45 </damping_coeff>
			<max_steer unit="DEG">0</max_steer>
			<brake_group>NONE</brake_group>
			<retractable>0</retractable>
		</contact>
		<contact type="BOGEY" name="LEFT_WING_WHEEL">
			<location unit="M">
				<x>  -1.25364 </x>
				<y>  -8.43947 </y>
				<z> 1.22131 </z>
			</location>
			<static_friction>  0.600 </static_friction>
			<dynamic_friction> 0.400 </dynamic_friction>
			<rolling_friction> 0.020 </rolling_friction>
			<spring_coeff unit="LBS/FT">        396.90 </spring_coeff>
			<damping_coeff unit="LBS/FT/SEC">   198.45 </damping_coeff>
			<max_steer unit="DEG">0</max_steer>
			<brake_group>NONE</brake_group>
			<retractable>0</retractable>
		</contact>
		<contact type="BOGEY" name="RIGHT_WING_WHEEL">
			<location unit="M">
				<x>  -1.25364 </x>
				<y>  8.43947 </y>
				<z> 1.22131 </z>
			</location>
			<static_friction>  0.600 </static_friction>
			<dynamic_friction> 0.400 </dynamic_friction>
			<rolling_friction> 0.020 </rolling_friction>
			<spring_coeff unit="LBS/FT">        396.90 </spring_coeff>
			<damping_coeff unit="LBS/FT/SEC">   198.45 </damping_coeff>
			<max_steer unit="DEG">0</max_steer>
			<brake_group>NONE</brake_group>
			<retractable>0</retractable>
		</contact>
		<contact type="BOGEY" name="LEFT_WING_ASSIST_GEAR">
			<location unit="M">
				<x>  -1.25364 </x>
				<y>  -8.43947 </y>
				<z> 0.05 </z>
			</location>
			<static_friction>  0.300 </static_friction>
			<dynamic_friction> 0.200 </dynamic_friction>
			<rolling_friction> 0.200 </rolling_friction>
			<spring_coeff unit="LBS/FT">        396.90 </spring_coeff>
			<damping_coeff unit="LBS/FT/SEC">   198.45 </damping_coeff>
			<max_steer unit="DEG">0</max_steer>
			<brake_group>NONE</brake_group>
			<retractable>1</retractable>
		</contact>
		<contact type="BOGEY" name="RIGHT_WING_ASSIST_GEAR">
			<location unit="M">
				<x>  -1.25364 </x>
				<y>  8.43947 </y>
				<z> 0.05 </z>
			</location>
			<static_friction>  0.300 </static_friction>
			<dynamic_friction> 0.200 </dynamic_friction>
			<rolling_friction> 0.200 </rolling_friction>
			<spring_coeff unit="LBS/FT">        396.90 </spring_coeff>
			<damping_coeff unit="LBS/FT/SEC">   198.45 </damping_coeff>
			<max_steer unit="DEG">0</max_steer>
			<brake_group>NONE</brake_group>
			<retractable>1</retractable>
		</contact>
	</ground_reactions>
	<propulsion>
		<engine file="IAE50R-AA">
			<location unit="M">
				<x>  0.0 </x>
				<y>  0.00 </y>
				<z>  0.88 </z>
			</location>
			<orient unit="DEG">
				<pitch> 0.00 </pitch>
				<roll>  0.00 </roll>
				<yaw>   0.00 </yaw>
			</orient>
			<feed>0</feed>
			<thruster file="AS2F1-1_R153-92-N1">
				<sense> 1 </sense>
				<location unit="M">
					<x>  -0.40978</x>
					<y>   0.00 </y>
					<z>   1.84412 </z>
				</location>
				<orient unit="DEG">
					<pitch> 1 </pitch>
					<roll>  0.00 </roll>
					<yaw>   0.00 </yaw>
				</orient>
			</thruster>
		</engine>
		<!--	ref. [2] 2.12 Fuel and Oil	-->
		<tank type="FUEL" number="0">
			<location unit="M">
				<x>-1.06023 </x>
				<y> 0.0 </y>
				<z> 0.9575 </z>
			</location>
			<capacity unit="KG"> 16.936 </capacity>	<!--	23.2 l AVGAS * 0.73 kg/l = 16.936 kg	-->
			<unusable unit="L">   0.2   </unusable>	<!--	23l out of 23.2l usable	-->
			<contents unit="KG"> 15.0   </contents>
		</tank>
	</propulsion>

	<flight_control file="Systems/ask21-fcs.xml"/>

	<system file="ask21mi-fcs"/>

	<aerodynamics file="Systems/ask21-aero.xml"/>

	<external_reactions file="Systems/ask21-external_reactions.xml" />

</fdm_config>
